// COMSOL Multiphysics 4.3.2.152 model "Comsol3Dcode_Model.mph"
// Outline of the model tree

Variables
  var1 "Variables 1"
    ep = +0.132/(1+(10^(-5.900)*ec.freq/1[Hz])^2)+0.064/(1+(10^(-5.319)*ec.freq/1[Hz])^2)+0.103/(1+(10^(-4.738)*ec.freq/1[Hz])^2)+0.090/(1+(10^(-4.155)*ec.freq/1[Hz])^2)+0.086/(1+(10^(-3.573)*ec.freq/1[Hz])^2)+0.066/(1+(10^(-2.991)*ec.freq/1[Hz])^2)+0.030/(1+(10^(-2.409)*ec.freq/1[Hz])^2)+0.025/(1+(10^(-1.827)*ec.freq/1[Hz])^2)+0.030/(1+(10^(-1.245)*ec.freq/1[Hz])^2)+0.024/(1+(10^(-0.664)*ec.freq/1[Hz])^2)+0.023/(1+(10^(-0.081)*ec.freq/1[Hz])^2)+0.023/(1+(10^(0.501)*ec.freq/1[Hz])^2)+0.023/(1+(10^(1.083)*ec.freq/1[Hz])^2)+0.021/(1+(10^(1.665)*ec.freq/1[Hz])^2)+0.042/(1+(10^(2.246)*ec.freq/1[Hz])^2)+-0.018/(1+(10^(2.829)*ec.freq/1[Hz])^2)+0.185/(1+(10^(3.410)*ec.freq/1[Hz])^2)+0.149/(1+(10^(3.993)*ec.freq/1[Hz])^2)+0.549/(1+(10^(4.574)*ec.freq/1[Hz])^2)+0.063/(1+(10^(5.155)*ec.freq/1[Hz])^2)+0.217/(1+(10^(5.739)*ec.freq/1[Hz])^2)+-0.557/(1+(10^(6.320)*ec.freq/1[Hz])^2)+3.100
    epp = +0.132*(10^(-5.900)*ec.freq/1[Hz])/(1+(10^(-5.900)*ec.freq/1[Hz])^2)+0.064*(10^(-5.319)*ec.freq/1[Hz])/(1+(10^(-5.319)*ec.freq/1[Hz])^2)+0.103*(10^(-4.738)*ec.freq/1[Hz])/(1+(10^(-4.738)*ec.freq/1[Hz])^2)+0.090*(10^(-4.155)*ec.freq/1[Hz])/(1+(10^(-4.155)*ec.freq/1[Hz])^2)+0.086*(10^(-3.573)*ec.freq/1[Hz])/(1+(10^(-3.573)*ec.freq/1[Hz])^2)+0.066*(10^(-2.991)*ec.freq/1[Hz])/(1+(10^(-2.991)*ec.freq/1[Hz])^2)+0.030*(10^(-2.409)*ec.freq/1[Hz])/(1+(10^(-2.409)*ec.freq/1[Hz])^2)+0.025*(10^(-1.827)*ec.freq/1[Hz])/(1+(10^(-1.827)*ec.freq/1[Hz])^2)+0.030*(10^(-1.245)*ec.freq/1[Hz])/(1+(10^(-1.245)*ec.freq/1[Hz])^2)+0.024*(10^(-0.664)*ec.freq/1[Hz])/(1+(10^(-0.664)*ec.freq/1[Hz])^2)+0.023*(10^(-0.081)*ec.freq/1[Hz])/(1+(10^(-0.081)*ec.freq/1[Hz])^2)+0.023*(10^(0.501)*ec.freq/1[Hz])/(1+(10^(0.501)*ec.freq/1[Hz])^2)+0.023*(10^(1.083)*ec.freq/1[Hz])/(1+(10^(1.083)*ec.freq/1[Hz])^2)+0.021*(10^(1.665)*ec.freq/1[Hz])/(1+(10^(1.665)*ec.freq/1[Hz])^2)+0.042*(10^(2.246)*ec.freq/1[Hz])/(1+(10^(2.246)*ec.freq/1[Hz])^2)+-0.018*(10^(2.829)*ec.freq/1[Hz])/(1+(10^(2.829)*ec.freq/1[Hz])^2)+0.185*(10^(3.410)*ec.freq/1[Hz])/(1+(10^(3.410)*ec.freq/1[Hz])^2)+0.149*(10^(3.993)*ec.freq/1[Hz])/(1+(10^(3.993)*ec.freq/1[Hz])^2)+0.549*(10^(4.574)*ec.freq/1[Hz])/(1+(10^(4.574)*ec.freq/1[Hz])^2)+0.063*(10^(5.155)*ec.freq/1[Hz])/(1+(10^(5.155)*ec.freq/1[Hz])^2)+0.217*(10^(5.739)*ec.freq/1[Hz])/(1+(10^(5.739)*ec.freq/1[Hz])^2)+-0.557*(10^(6.320)*ec.freq/1[Hz])/(1+(10^(6.320)*ec.freq/1[Hz])^2)
    epint = +0.132*DS1/(1+(10^(-5.900)*TS1*ec.freq/1[Hz])^2)+0.064*DS1/(1+(10^(-5.319)*TS1*ec.freq/1[Hz])^2)+0.103*DS1/(1+(10^(-4.738)*TS1*ec.freq/1[Hz])^2)+0.090*DS1/(1+(10^(-4.155)*TS1*ec.freq/1[Hz])^2)+0.086*DS1/(1+(10^(-3.573)*TS1*ec.freq/1[Hz])^2)+0.066*DS1/(1+(10^(-2.991)*TS1*ec.freq/1[Hz])^2)+0.030*DS1/(1+(10^(-2.409)*TS1*ec.freq/1[Hz])^2)+0.025*DS1/(1+(10^(-1.827)*TS1*ec.freq/1[Hz])^2)+0.030*DS1/(1+(10^(-1.245)*TS1*ec.freq/1[Hz])^2)+0.024*DS2/(1+(10^(-0.664)*TS2*ec.freq/1[Hz])^2)+0.023*DS2/(1+(10^(-0.081)*TS2*ec.freq/1[Hz])^2)+0.023*DS2/(1+(10^(0.501)*TS2*ec.freq/1[Hz])^2)+0.023*DS2/(1+(10^(1.083)*TS2*ec.freq/1[Hz])^2)+0.021*DS2/(1+(10^(1.665)*TS2*ec.freq/1[Hz])^2)+0.042*DS2/(1+(10^(2.246)*TS2*ec.freq/1[Hz])^2)+-0.018*DS2/(1+(10^(2.829)*TS2*ec.freq/1[Hz])^2)+0.185*DS2/(1+(10^(3.410)*TS2*ec.freq/1[Hz])^2)+0.149*DS2/(1+(10^(3.993)*TS2*ec.freq/1[Hz])^2)+0.549*DS2/(1+(10^(4.574)*TS2*ec.freq/1[Hz])^2)+0.063*DS2/(1+(10^(5.155)*TS2*ec.freq/1[Hz])^2)+0.217*DS2/(1+(10^(5.739)*TS2*ec.freq/1[Hz])^2)+-0.557*DS2/(1+(10^(6.320)*TS2*ec.freq/1[Hz])^2)+3.100+const
    eppint = +0.132*DS1*(10^(-5.900)*TS1*ec.freq/1[Hz])/(1+(10^(-5.900)*TS1*ec.freq/1[Hz])^2)+0.064*DS1*(10^(-5.319)*TS1*ec.freq/1[Hz])/(1+(10^(-5.319)*TS1*ec.freq/1[Hz])^2)+0.103*DS1*(10^(-4.738)*TS1*ec.freq/1[Hz])/(1+(10^(-4.738)*TS1*ec.freq/1[Hz])^2)+0.090*DS1*(10^(-4.155)*TS1*ec.freq/1[Hz])/(1+(10^(-4.155)*TS1*ec.freq/1[Hz])^2)+0.086*DS1*(10^(-3.573)*TS1*ec.freq/1[Hz])/(1+(10^(-3.573)*TS1*ec.freq/1[Hz])^2)+0.066*DS1*(10^(-2.991)*TS1*ec.freq/1[Hz])/(1+(10^(-2.991)*TS1*ec.freq/1[Hz])^2)+0.030*DS1*(10^(-2.409)*TS1*ec.freq/1[Hz])/(1+(10^(-2.409)*TS1*ec.freq/1[Hz])^2)+0.025*DS1*(10^(-1.827)*TS1*ec.freq/1[Hz])/(1+(10^(-1.827)*TS1*ec.freq/1[Hz])^2)+0.030*DS1*(10^(-1.245)*TS1*ec.freq/1[Hz])/(1+(10^(-1.245)*TS1*ec.freq/1[Hz])^2)+0.024*DS2*(10^(-0.664)*TS2*ec.freq/1[Hz])/(1+(10^(-0.664)*TS2*ec.freq/1[Hz])^2)+0.023*DS2*(10^(-0.081)*TS2*ec.freq/1[Hz])/(1+(10^(-0.081)*TS2*ec.freq/1[Hz])^2)+0.023*DS2*(10^(0.501)*TS2*ec.freq/1[Hz])/(1+(10^(0.501)*TS2*ec.freq/1[Hz])^2)+0.023*DS2*(10^(1.083)*TS2*ec.freq/1[Hz])/(1+(10^(1.083)*TS2*ec.freq/1[Hz])^2)+0.021*DS2*(10^(1.665)*TS2*ec.freq/1[Hz])/(1+(10^(1.665)*TS2*ec.freq/1[Hz])^2)+0.042*DS2*(10^(2.246)*TS2*ec.freq/1[Hz])/(1+(10^(2.246)*TS2*ec.freq/1[Hz])^2)+-0.018*DS2*(10^(2.829)*TS2*ec.freq/1[Hz])/(1+(10^(2.829)*TS2*ec.freq/1[Hz])^2)+0.185*DS2*(10^(3.410)*TS2*ec.freq/1[Hz])/(1+(10^(3.410)*TS2*ec.freq/1[Hz])^2)+0.149*DS2*(10^(3.993)*TS2*ec.freq/1[Hz])/(1+(10^(3.993)*TS2*ec.freq/1[Hz])^2)+0.549*DS2*(10^(4.574)*TS2*ec.freq/1[Hz])/(1+(10^(4.574)*TS2*ec.freq/1[Hz])^2)+0.063*DS2*(10^(5.155)*TS2*ec.freq/1[Hz])/(1+(10^(5.155)*TS2*ec.freq/1[Hz])^2)+0.217*DS2*(10^(5.739)*TS2*ec.freq/1[Hz])/(1+(10^(5.739)*TS2*ec.freq/1[Hz])^2)+-0.557*DS2*(10^(6.320)*TS2*ec.freq/1[Hz])/(1+(10^(6.320)*TS2*ec.freq/1[Hz])^2)
    TS1 = 1.0
    DS1 = 1.0
    TS2 = 1.0
    DS2 = 1.0
    const = 0.0

Geometry
  geom1 "Geometry 1" (3D, length unit mm)
    blk1: Block | size = {5.7361376676E-4, 5.7361376676E-4, 5.7361376676E-4}
    Ellipse0: Ellipsoid
      pos = {6.50095602481e-05, 6.50095602481e-05, 6.50095602481e-05}
      rot = 20
      semiaxes = {7.6481835721e-06, 3.8240917631e-06, 3.8240917631e-06}
    Ellipse1: Ellipsoid
      pos = {0.000133843212259, 8.03059273464E-5, 8.03059273464E-5}
      rot = 20
      semiaxes = {7.6481835721e-06, 3.8240917631e-06, 3.8240917631e-06}
    UnionFiller: Union | input = Ellipse0, Ellipse1; intbnd = off; face = all
    EllipseIF10: Ellipsoid
      pos = {6.50095602481e-05, 6.50095602481e-05, 6.50095602481e-05}
      rot = 20
      semiaxes = {1.26481835721e-05, 8.8240917631e-06, 8.8240917631e-06}
    EllipseIF11: Ellipsoid
      pos = {0.000133843212259, 8.03059273464E-5, 8.03059273464E-5}
      rot = 20
      semiaxes = {1.26481835721e-05, 8.8240917631e-06, 8.8240917631e-06}
    UnionLargeEllipse1: Union | input = EllipseIF10, EllipseIF11; intbnd = off; face = all
    DiffInterface1: Difference | input = UnionLargeEllipse1; input2 = UnionFiller; keep = on; intbnd = off; face = all
    EllipseIF20: Ellipsoid
      pos = {6.50095602481e-05, 6.50095602481e-05, 6.50095602481e-05}
      rot = 20
      semiaxes = {6.26481835721e-05, 5.88240917631e-05, 5.88240917631e-05}
    EllipseIF21: Ellipsoid
      pos = {0.000133843212259, 8.03059273464E-5, 8.03059273464E-5}
      rot = 20
      semiaxes = {6.26481835721e-05, 5.88240917631e-05, 5.88240917631e-05}
    UnionLargeEllipse2: Union | input = EllipseIF20, EllipseIF21; intbnd = off; face = all
    DiffInterface2: Difference
      input = UnionLargeEllipse2
      input2 = UnionLargeEllipse1
      keep = on
      intbnd = off
      face = all
    DiffMatrix: Difference | input = blk1; input2 = UnionLargeEllipse2; keep = on
    fin: Finalize "Form Union"

Materials
  mat1 "Material 1" on selection geom1_UnionFiller_dom
    def "Basic"
      electricconductivity = 1.0E-15
      relpermittivity = 3.9
  mat2 "Material 2" on selection geom1_DiffMatrix_dom
    def "Basic"
      relpermittivity = ep-j*epp
      electricconductivity = 1.0E-15
  mat4 "Material 4" on selection geom1_DiffInterface1_dom
    def "Basic"
      relpermittivity = 2.4-j*0.0010
      electricconductivity = 1.0E-11
  mat5 "Material 5" on selection geom1_DiffInterface2_dom
    def "Basic"
      relpermittivity = epint-j*eppint
      electricconductivity = 1.0E-15

Physics
  ec: ConductiveMedia "Electric Currents" on all domains
    dependent variable V
    cucn1: CurrentConservation (default)
    ein1: ElectricInsulation (default)
    init1: init "Initial Values 1" (default) | V = 1.0E-5
    gnd1: Ground on boundaries 4
    pc1: PeriodicCondition on boundaries 1, 6
    term1: Terminal on boundaries 3 | TerminalType = Voltage; V0 = 0.0015

Mesh
  mesh1 "Mesh 1" (physics-controlled)
    size: MeshSizeDefault | hauto = 5

Studies
  std1 "Study 1"
    freq: Frequency "Frequency Domain"
      plist = {0.0010, 0.00158489319246, 0.00251188643151, 0.00398107170553, 0.0063095734448, 0.01, 0.0158489319246, 0.0251188643151, 0.0398107170553, 0.063095734448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}
      physselection = ec

Solver configurations
  sol1 "Solver 1" (study std1)
    v1: Variables "Dependent Variables 1"
    s1: Stationary "Stationary Solver 1"
      p1: Parametric | pname = freq
      fc1: FullyCoupled | linsolver = i1
      i1: Iterative | linsolver = bicgstab
        mg1: Multigrid | prefun = gmg

Datasets
  dset1: Solution | solution = sol1

Derived values
  av1: AvSurface "Surface Average 1" on boundaries 4
    data = dset1
    table = tbl1
    expr = imag(ec.Jy/0.002[V])*0.001[mm]/ec.freq/2/3.14/8.85e-12[F/m]
  av2: AvSurface "Surface Average 2" on boundaries 4
    data = dset1
    table = tbl2
    expr = imag(ec.Jy/0.002[V])*0.001[mm]/ec.freq/2/3.14/8.85e-12[F/m]

Plots
  pg1: PlotGroup3D "Electric Potential (ec)" | data = dset1
    slc1: Slice | expr = V; quickplane = xy; quickznumber = 1; genpoints = {{0, 0, 0}, {1, 0, 0}, {0, 1, 0}}
    slc2: Slice | expr = V; quickplane = yz; quickxnumber = 1; genpoints = {{0, 0, 0}, {1, 0, 0}, {0, 1, 0}}
    slc3: Slice | expr = V; quickplane = zx; quickynumber = 1; genpoints = {{0, 0, 0}, {1, 0, 0}, {0, 1, 0}}
  pg2: PlotGroup1D "1D Plot Group 2" | data = dset1
    tblp1: Table "Table Graph 1" | table = tbl1
  pg3: PlotGroup1D "1D Plot Group 3" | data = dset1
    tblp2: Table "Table Graph 2" | table = tbl2

Exports
  plot1: Plot | filename = ./HZ_3D_comsolbuild_AC_recon_2015/10/14_22:03:24_IP5.0+50.0_run_1.0_CompPermImag.csv
  plot2: Plot | filename = ./HZ_3D_comsolbuild_AC_recon_2015/10/14_22:03:24_IP5.0+50.0_run_1.0_CompPermReal.csv